*Heading
** Job name: 060 Model name: 060
** Generated by: Abaqus/CAE 2023
*Preprint, echo=NO, model=NO, history=NO, contact=NO
**
** PARTS
**
*Part, name=Part-1
*End Part
**
**
** ASSEMBLY
**
*Assembly, name=Assembly
**
*Instance, name=Part-1-1, part=Part-1
*Node
      1,        -17.5,          45.,  0.600000024
      2,         17.5,          45.,  0.600000024
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*Element, type=C3D8
  1,  71, 114,  97,  74, 313, 356, 339, 316
  2, 125, 121, 114,  98, 367, 363, 356, 340
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*Nset, nset=Set-1, generate
     1,  11680,      1
*Elset, elset=Set-1, generate
    1,  5679,     1
** Section: Section-1
*Solid Section, elset=Set-1, material=Property
,
*End Instance
**
*Elset, elset=center, instance=Part-1-1
 2566,
*Nset, nset=upperU, instance=Part-1-1
 2116,
*Nset, nset=xpin, instance=Part-1-1
 245,
*Nset, nset=ylower, instance=Part-1-1
 520, 521, 522, 542, 543, 545, 546, 584, 585, 586
*Elset, elset=ylower, instance=Part-1-1
 242, 243, 245, 420
*Nset, nset=yupper, instance=Part-1-1
   3,   4,  40,  41,  42, 245, 246, 282, 283, 284
*Elset, elset=yupper, instance=Part-1-1
  15,  32, 205, 208
*Nset, nset=zboundary, instance=Part-1-1
   243,   244,   245,   246,   247,   248
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*Elset, elset=zboundary, instance=Part-1-1, generate
    1,  5679,     1
*End Assembly
**
** MATERIALS
**
*Material, name=Property
*Depvar, delete=16
     23,
*User Material, constants=2406
206000.,         0.3,        100.,          0.,          0.,          0.,          1., 1.45104e-21
          2., 1.91254e-19,          3., 3.32422e-18,          4., 2.52081e-17,          5.,  1.2134e-16
          6., 4.38146e-16,          7.,  1.2974e-15,          8., 3.32253e-15,          9., 7.61549e-15
         10., 1.59931e-14,         11., 3.12919e-14,         12., 5.77495e-14,         13., 1.01473e-13
         14., 1.71003e-13,         15.,  2.7798e-13,         16., 4.37924e-13,         17., 6.71141e-13
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       1198.,     6.93352,       1199.,     6.97438,       1200.,     7.01545
**
** BOUNDARY CONDITIONS
**
** Name: BC-1 Type: Symmetry/Antisymmetry/Encastre
*Boundary
zboundary, ZSYMM
** Name: BC-4 Type: Symmetry/Antisymmetry/Encastre
*Boundary
xpin, XSYMM
** ----------------------------------------------------------------
**
** STEP: Step-1
**
*Step, name=Step-1, nlgeom=YES, inc=100000
*Static
0.001, 1., 1e-10, 0.001
**
** BOUNDARY CONDITIONS
**
** Name: BC-2 Type: Displacement/Rotation
*Boundary
yupper, 2, 2, 10.
** Name: BC-3 Type: Displacement/Rotation
*Boundary
ylower, 2, 2, -10.
**
** OUTPUT REQUESTS
**
*Restart, write, frequency=0
**
** FIELD OUTPUT: F-Output-1
**
*Output, field
*Node Output
RF, U
*Element Output, directions=YES
S, SDV
**
** HISTORY OUTPUT: H-Output-1
**
*Output, history
*Element Output
IRA1, IRA2, IRA3, IRAR1, IRAR2, IRAR3
*End Step
